#  Back
## RefProp 2.0
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# Chapter 3  General Usage
# The RefProp Add-in Functions
#
# Once RefProp is installed, the RefProp Add-in functions will be available and registered by Mathcad 15.  These functions follow a specific naming convention.  This is exactly the naming convention used in other Mathcad add-ins such as the legacy ASME Steam Tables add-in from Adept Science (no longer distributed or supported) and the IF97 add-in from CoolProp.
#
# - Each function starts with the prefix "rp_".  This avoids conflicts with any other add-ins that may be loaded.
#
# - The next characters in the function identify the physical property to be calculated.  The available properties are:
# Thermodynamic properties
# - rho (density),
# - h (enthalpy),
# - u (internal energy),
# - s (entropy),
# - cp (isobaric specific heat),
# - cv (isochoric specific heat),
# - w (speed of sound)
#
# Transport properties
# - mu (viscosity)
# - k (thermal conductivity)
#
# State Point
# - t (temperature)
# - p (pressure)
# - tsat (saturation temperature)
# - psat (saturation pressure)
# - The property may be followed by either f (liquid) or g (gas) to get the saturation state, typically as a function of either the saturation temperature or saturation pressure (e.g. hf = saturated liquid/fluid enthalpy, sg = saturated vapor/gas entropy).
# - The property may also be followed by either crit or trip (only) to get retrieve the critical point or triple point values of pressure (p), temperature (t), or density (rho).
# - The last characters in the function identify the state point value(s) to be used to calculate the physical property:
# State Point Location
# - tp (temperature & pressure)
# - t (temperature)
# - p (pressure)
# -
# Reverse State Point Location
# - ph (pressure & enthalpy)
# - ps (pressure & entropy)
# - th (temperature & enthalpy)
# - ts (temperature & entropy)
# - hs (enthalpy & entropy)
# For example:
rp_rhotp("fluid", T, P)  # = Density as a function of temperature and pressure
rp_hfp("fluid", P)  # = Saturated liquid enthalpy as a function of pressure
rp_cpgt("fluid", T)  # = Saturated vapor specific heat as a function of temperature
rp_ths("fluid", H, S)  # = Temperature as a function of enthalpy and entropy
rp_ptrip(P, icomp)  # = Triple point pressure (icomp = 0 for pure fluids)
# - The parameters to these functions are specified by the last set of characters, preceded by the fluid string identifying the fluid to be evaluated (see below).
#
# - A few of the functions (some reverse functions and critical/triple point) also require an additional parameter (consult the property function listing in Chapter 4).
# -
# - These functions are all listed in Chapter 4 - Fluid Property Functions.
#
# - Additional Utility Functions described in Chapter 7.
# Integration into the Mathcad 15 Interface
#
# Mathcad 15 has the ability to integrate these add-in function into the program's user interface through the Insert | Function panel.  This simplifies function selection and insertion; providing a brief description of the function, its parameters, usage, and expected units.
#
# - Select Insert | Function from the main menu, and select NIST RefProp from the Function Category
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# - The RefProp functions are listed alphabetically in the function list and can be inserted at the cursor location by pressing the [Insert] or [OK] button.
#
# - In the bottom of the form is a usage line, showing the required parameters, and a description of the function and its usage including a description of the parameters and the input and output units.
#
# - Alternatively, the RefProp functions may be called indirectly through the supplied reference worksheet that applies unit handling to the input parameters and output results of all the functions.  This is the preferred method of accessing the RefProp functions.  See Applying Units to the RefProp Functions.
# Fluid Material Selection
#
# The property coefficients for each fluid and pre-defined mixture are stored in individual files in the fluids\ and mixtures\ sub-folders of the RefProp installation directory, respectively.
#
# Each of the property functions requires a fluid string as it's first parameter.  This parameter communicates to the RefProp internal routines which fluid material  file should be used to calculate the material properties.
# NOTE: Each fluid property function makes a call internally to the RefProp SETUP routine, which loads the fluid file from the database location.  However, if the fluid requested is already loaded, no action is taken; eliminating unnecessary file I/O.
# Details:
#
# - The "fluid string" for a Pure Fluid file to be loaded from RefProp can (optionally) end with an extension of ".fld".  If the suffix is omitted, RefProp will assume an extension of ".fld" and look first in the "fluids\" sub-folder.
#
# e.g. to load the properties for HELIUM, define a variable such as:
#
# fluid := "HELIUM.fld"  or just  fluid := "HELIUM"
#
# - Pseudo-Pure Fluids are mixtures that have been re-fit to load like a pure fluid.  The "fluid string" for these files must end with the extension ".ppf".
# -
# - Predefined Mixtures are located in the "mixtures\" folder. The
# "fluid string" must use the suffix ".mix".
#
# - If the suffix is omitted, RefProp will look preferentially in the "fluids\" folder for a .fld file, then a .ppf file, and then in the "mixtures\" folder for a .mix file.
#
# - An Ad-hoc Mixture can also be specified in the "fluid string" as outlined in Chapter 8 - Mixture Properties.
#
# - Legal pure fluid files as of RefProp 9.1 are shown below in Table 1, pseudo-pure fluids in Table 2, and mixture files are listed in Table 3.  However, users should consult their latest version documentation.
## Table 1 : RefProp Pure Fluid Files
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## Table 2 : RefProp Pseudo-Pure Fluid Files
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## Table 3 : RefProp Predefined Mixture Files
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# Context Sensitive Help
#
# Additional help on the functions can be obtained by placing the cursor on one of the RefProp functions in the worksheet and pressing the F1 key.  This help window, in addition to giving help on the selected function, provides some more general usage information.
