#  Back
## RefProp 2.0
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# Chapter 5  Applying Units to RefProp Functions
# Creating Function Wrappers
#
# Parameters to the RefProp functions must be supplied in the required units (as specified in the help text for each function under Insert Function).  However, these parameters cannot have actual Mathcad Units attached to them (i.e. they should be unit-less numbers); otherwise incorrect values may be returned as a function result.  The results, too, will be returned in the specified units.
#
# To enable usage of Mathcad units and handle unit conversions automatically, create a Mathcad user function that:
# Divides all of the parameters by the units required by the RefProp function.
# Multiplies the result by the units of the RefProp function return value.
#
# Example:
# The RefProp function rp_hfp(fluidstr,p) returns the saturated liquid enthalpy [kJ/kg]. The parameter, p, is the input saturation pressure [MPa].
#
# Create a user function to handle the units according to the instructions above:
h_lsat(fluidstr, p) := rp_hfp(fluidstr, p/MPa)*kJ/kg
# Note: kJ is not a pre-defined unit, so we have to define it here:  kJ ≡ 1000*joule
# We can now use the wrapper function, instead of calling the RefProp function directly.
fluid := "WATER.fld"  # Specify Water as the fluid
P := 1200*psi  # Pressure can then be supplied in any pressure units.
h_lsat(fluid, P) = 571.938 International_BTU/lb  # The result can be displayed in any specific energy units.
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# Using the Supplied Reference Sheet
#
# Creating function wrappers for all of the functions required can be tedious and provide for inconsistencies between worksheets.  A complete set of function wrappers has been supplied in the reference worksheet, Refprop_units.xmcd, in the RefProp Handbook directory.
#
# The Refprop_units.xmcd worksheet can be referenced near the top of any worksheet in which you want to use the wrapper functions.
#
# To reference the units worksheet:
# Choose Insert | Reference... from the main menu.
# Brows to the location of the reference worksheet as shown below.
# Leave the check box in the bottom left hand corner unchecked.
# Press OK.
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# The reference will show up in the worksheet at the cursor location as shown:
# [reference: RefProp_units.xmcd]
# You can double click on the reference link to open the reference worksheet and see all the wrapper functions that are available
# All of the pre-defined wrapper functions in the reference worksheet can now be used:
T_c(fluid, 0) = 705.103 °F
P_c(fluid, 0) = 3200.11 psi
T_2 := 0.5*T_c(fluid, 0)
ρ_tp(fluid, T_2, P_c(fluid, 0)) = 62.2539 lb/ft^3
Name(fluid, 1) = "Water"
CASN(fluid, 1) = "7732-18-5"
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# The available functions in the reference worksheet are listed below.  Keep in mind that each function requires, as its first parameter, a fluid string (fl).
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