#  Back
## RefProp 2.0
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## Chapter 6  Reverse Functions
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# Since all of the RefProp functions rely on the Helmholtz free energy surface (f), they are all constructed as direct functions of Temperature and Density
# (just like f).  While every function of Temperature and Pressure starts with a reverse function to calculate density (so that the direct functions may be used), there are some additional functions that are of use in standard thermodynamic energy cycle calculations.  These functions require more complex iteration and convergence behavior and so may require more computational time to evaluate.  This should be kept in mind when using these functions, especially if called repeatedly within a loop.
#
# Additionally, some of the functions below are multi-valued; specifically the Pressure, Density, and Entropy functions of Temperature and Enthalpy.  This occurs because the curves may fold back on themselves; creating an upper and lower density intersection point for a given input (H) parameter (see Figure 1 below).  In these situations, there is an extra parameter, r, in the parameter list that indicates whether the lower density root (r=1), or the upper root (r=2) is requested.
#
# The reverse functions are categorized below by return value.  The first parameter in all of these functions is a "fluid string" variable that identifies the fluid material to be used for the property calculations.  The input and return values are specified in the following units:
#
# Property  Symbol  Required Unit
# Temperature  t  K
# Pressure  p  MPa
# Enthalpy  h  kJ/kg
# Entropy  s  kJ/kg-K
# Density  rho  kg/m³
#
# The reverse function names all begin with rp_ followed by the returned property, which is followed by the two input parameters in the order expected in the parameter list.
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# Figure 1 : Pressure-Enthalpy plot showing double valued isotherms for given values of Enthalpy, H.  The higher density roots usually occur at very high pressures, way above the critical point.  However, at low enthalpy and temperature values, dual roots can occur in the sub-cooled liquid region.
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# Temperature Functions, t
kJ ≡ 1000*J
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# Raw Function | Application of Units
rp_tph(fl, t, h)
T_ph(fl, p, h) := rp_tph(fl, p/MPa, h*kg/kJ)*K
rp_tps(fl, p, s)
T_ps(fl, p, s) := rp_tps(fl, p/MPa, s*kg*K/kJ)*K
rp_ths(fl, h, s)
T_hs(fl, h, s) := rp_ths(fl, h*kg/kJ, s*kg*K/kJ)*K
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# Pressure Functions, p
# Raw Function | Application of Units
rp_pth(fl, t, h, r)
P_th(fl, t, h, r) := rp_pth(fl, t/K, h*kg/kJ, r)*MPa
rp_pts(fl, t, s)
P_ts(fl, t, s) := rp_pts(fl, t/K, s*kg*K/kJ)*MPa
rp_phs(fl, h*s)
P_hs(fl, h, s) := rp_phs(fl, h*kg/kJ, s*kg*K/kJ)*MPa
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# Density Functions, rho
# Raw Function | Application of Units
rp_rhoth(fl, t, h*r)
ρ_th(fl, t, h, r) := rp_rhoth(fl, t/K, h*kg/kJ, r)*kg/m^3
rp_rhoph(fl, p, h)
ρ_ph(fl, p, h) := rp_rhoph(fl, p/MPa, h*kg/kJ)*kg/m^3
rp_rhots(fl, t, s)
ρ_ts(fl, t, s) := rp_rhots(fl, t, s)*kg/m^3
rp_rhops(fl, p, s)
ρ_ps(fl, p, s) := rp_rhops(fl, p/MPa, s*kg*K/kJ)*kg/m^3
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# Enthalpy Functions, h
# Raw Function | Application of Units
rp_hps(fl, p, s)
h_ps(fl, p, s) := rp_hps(fl, p/MPa, s*kg*K/kJ)*kJ/kg
rp_hts(fl, t, h)
h_ts(fl, t, h) := rp_hts(fl, t/K, h*kg*K/kJ)*kJ/kg
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# Entropy Functions, s
# Raw Function | Application of Units
rp_sph(fl, p, h)
s_ph(fl, p, h) := rp_sph(fl, p/MPa, h*kg/kJ)*kJ/(kg*K)
rp_sth(fl, t, h, r)
s_th(fl, t, h, r) := rp_sth(fl, t/K, h*kg/kJ, r)*kJ/(kg*K)
