#  Back
## RefProp 2.0
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# Chapter 8  Mixture Properties
# In addition to selecting pure fluids, RefProp has very sophisticated algorithms for calculating properties of mixtures.  There are several ways to specify a mixture as the requested fluid in RefProp:
#
# - Pseudo-Pure Fluids
# - Predefined Mixture Files
# - Custom Mixture Files
# - Ad-Hoc Fluid Mixture Strings
#
# These methods will be discussed  in detail below.
# Pseudo-Pure Fluids
#
# There are a few mixtures for which the material properties have been fit as though the mixture was a pure fluid.  These are pseudo-pure fluids
# Details:
#
# - The "fluid string" can be set to one of the pseudo-pure fluids files to be loaded from the "fluids\" directory.  These files MUST end with the extension ".ppf".
#
# e.g. to load the properties for AIR, define a variable such as:
#
# fluid := "AIR.ppf"
#
# - A list of the pseudo-pure fluid files available are are shown in the table below.
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# Predefined Mixture Files
#
# Mixture files are small files that identify the component pure fluids that make up the mixture and the single-phase mole fractions of each component.  The file also contains a number of parameters to provide the mixture molecular mass and the limiting temperatures and pressures for the overall mixture.
#
# For example, this is the mixture file for Air (as opposed to the ppf file described above).  This text file, AIR.mix, is in the REFPROP\Mixtures directory.
# Air (dry)
# 28.958600656 132.791424977327 3844.70114021364 11.9051814519786
# 3
# NITROGEN.FLD
# ARGON.FLD
# OXYGEN.FLD
# .7812
# .0092
# .2096
# 0
# The table below contains a list of all of the predefined mixture files available in RefProp, stored in the mixtures folder of the REFPROP installation directory.  The vast majority of these mixture files are refrigerant combinations in addition to AIR and a handful of regional natural gas mixtures.
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# Details:
#
# - The "fluid string" can be set to one of the pre-defined mixture files to be loaded from the "mixtures\" directory.  These files MUST end with the extension ".mix".
#
# e.g. to load the properties for AIR, define a variable such as:
#
# fluid := "AIR.mix"
# Custom Mixture Files
#
# Since mixture files are just text files, new mixtures of pure fluids can be created.  REFPROP will apply its mixture correlations to provide fairly accurate mixture properties.
#
# The format of a mixture file is as follows,
# Mixture Name
# [molar mass] [Tcrit(K)] [Pcrit(kPa)] [Dcrit(mol/m³)]
# n  // = number of components
# fluid1.fld  // component 1
# fluid2.fld  // component 2
# |
# fluidn.fld  // component n
# mf1  // mole fraction 1
# mf2  // mole fraction 2
# |
# mfn  // mole fraction n
# 0  // end of file delimiter
# These files can be constructed for new mixtures so that they can be reused over and over again, without having to specify the mixture parameters repeatedly.  Luckily, the Graphical User Interface (GUI) for RefProp provides a handy facility for creating and saving new mixture files.
#
# As an example, let's create an alternative mixture for air that has slightly different mole fractions and an additional carbon dioxide component than the predefined AIR.mix file.
# Open the REFPROP GUI and select New Mixture from the Substance menu.
# In the Define Mixture panel, select the four components for air, including carbon dioxide, to form a quaternary mixture.
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# Select OK and then fill in the mole fractions for each component per the figure below.  All component mole fractions should sum to 1.0; however, you can select the checkbox to normalize the mole fractions to one and REFPROP will do just that.  Change the name in the top box to a suitable name for the mixture.
# Select Store and store the mixture file in the mixtures directory with an appropriate file name (like AIR4.MIX).  This mixture file will now be available for use in REFPROP.
#
# Let's use the original and new mixture files for air to calculate room temperature density and compare it to the pseudo-pure fluid value.
T := 22 °C
P := 1*atm
ρ_orig := rp_rhotp("AIR.mix", T/K, P/MPa)*kg/m^3 = 1.19608 kg/m^3
ρ_new := rp_rhotp("AIR4.mix", T/K, P/MPa)*kg/m^3 = 1.19635 kg/m^3
ρ_ppf := rp_rhotp("AIR.ppf", T/K, P/MPa)*kg/m^3 = 1.1964 kg/m^3
(ρ_orig - ρ_ppf)/ρ_ppf = -0.02655 %
(ρ_new - ρ_ppf)/ρ_ppf = -0.00355127 %
# It appears that the new quaternary mixture including carbon dioxide is closer to the pseudo-pure fluid density than the ternary mixture.  Both mixture densities, however, are fairly close to the density calculated from the pseudo-pure fluid.
# Ad-Hoc Mixture Strings
#
# REFPROP provides facility for embedding multiple mixture components right in the fluid string passed to the interface functions.  The Mathcad Add-In interface, takes this a step further and allows not only the component names, but also the mole fractions of each component to be embedded in the fluid string.  The format for mixture fluids is as follows.  Within the fluid string,
#
# Separate each component with an "&" character,
# Follow each component with its mole fraction, surrounded by "[" and "]",
# Limit number of components to 20, although more components makes the flash calculations harder and they may fail in the REFPROP solver,
# Zero mole fraction components will be parsed out,
# Total of mole fractions must sum exactly to one (1.0).
#
# For example, a binary representation for Air could be input with the following fluid string.
Air_binary := "Oxygen[0.21]&Nitrogen[0.79]"
ρ_air2 := rp_rhotp(Air_binary, T/K, P/MPa)*kg/m^3 = 1.19161 kg/m^3
ρ_ppf = 1.1964 kg/m^3
(ρ_ppf - ρ_air2)/ρ_ppf = 0.400471 %
# This binary representation for air carries a bit more error than the more detailed mixtures shown previously.  The mixture string, however, can hold up to 20 components, making the representation ass accurate as needed, including many of the trace components of air.  Failure to adhere to the mixture string format will result in a Mathcad error on the function call.
#
# To facilitate this process, a utility function, MixString(M) is provided in the Refprop_units reference worksheet that simplifies assembling these mixture strings and making sure that the mole fractions all sum to unity.
#
# To use this utility function, first include the reference worksheet:
# [reference: RefProp_units.xmcd]
# Set up the representation for the mixture in a matrix, where the first column is the pure component file string and the second column is the corresponding mole fraction of each component.  Check that the second column sums to 1.0.
M2 := ["Oxygen", 0.21; "Nitrogen", 0.79]
sum(M2[:, 1]) = 1
M3 := ["Oxygen", 0.2096; "Nitrogen", 0.7812; "Argon", 0.0092]
sum(M3[:, 1]) = 1
M4 := ["Oxygen", 0.20948; "Nitrogen", 0.78084; "Argon", 0.00934; "CO2", 0.00034]
sum(M4[:, 1]) = 1
# Now the mixture strings can be assembled using the utility function.
Air2 := MixString(M2)
Air3 := MixString(M3)
Air4 := MixString(M4)
Air2 = "Oxygen[0.21]&Nitrogen[0.79]"
Air3 = "Oxygen[0.2096]&Nitrogen[0.7812]&Argon[0.0092]"
Air4 = "Oxygen[0.20948]&Nitrogen[0.78084]&Argon[0.00934]&CO2[0.00034]"
# The property functions from the unit reference worksheet can be called using this utility function directly.
ρ_air2 := ρ_tp(MixString(M2), T, P) = 1.19161 kg/m^3
(ρ_ppf - ρ_air2)/ρ_ppf = 0.400471 %
ρ_air3 := ρ_tp(MixString(M3), T, P) = 1.19608 kg/m^3
(ρ_ppf - ρ_air3)/ρ_ppf = 0.02655 %
ρ_air4 := ρ_tp(MixString(M4), T, P) = 1.19635 kg/m^3
(ρ_ppf - ρ_air4)/ρ_ppf = 0.00355127 %
# The tertiary mixture gives exactly the same result as the predefined mixture file, since the ad-hoc string contains exactly the same components and mole fractions.  The quaternary mixture results in a more accurate density calculation, compared to the pseudo-pure fluid density, and exactly the same result as was calculated using the custom air mixture file above.
ρ_new = 1.19635 kg/m^3
