# Chapter 4 : Fluid Properties
## RefProp 2.0
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## 4.10  Thermal Conductivity, k
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# Thermal Conductivity arises from the law of conduction in the study of heat transfer. It is often refered to as a constant of proportionality. It provides important information on the heat conduction rate given a temperature gradient and surface area perpendicular to the heat flow. Thermal conductivity is also used in many empirically derived relationships which are important in the study of heat transfer.
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# Functions that return Thermal Conductivity
rp_ktp(fluid, t, p)
# Obtains thermal conductivity (k) of superheated vapor or compressed liquid in kW/m-K as a function of temperature (t) in K and Pressure (p) in MPa.
rp_kft(fluid, t)  # Obtains thermal conductivity (k) of saturated liquid in kW/m-K as a function of Temperature (t) in K.
rp_kfp(fluid, p)  # Obtains thermal conductivity (k) of saturated liquid in kW/m-K as a function of Pressure (p) in MPa.
rp_kgt(fluid, t)  # Obtains thermal conductivity (k) of saturated vapor in kW/m-K as a function of Temperature (t) in K.
rp_kgp(fluid, p)  # Obtains thermal conductivity (k) of saturated vapor in kW/m-K as a function of Pressure (p) in MPa.
# NOTE : The first parameter in all of these functions is a "fluid string" variable that identifies the fluid material to be used for the property calculations.
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# Application of Units
k_tp(fluid, T, P) := rp_ktp(fluid, T/K, P/MPa)*W/(m*K)
k_ft(fluid, T) := rp_kft(fluid, T/K)*W/(m*K)
k_gt(fluid, T) := rp_kgt(fluid, T/K)*W/(m*K)
k_fp(fluid, P) := rp_kfp(fluid, P/MPa)*W/(m*K)
k_gp(fluid, P) := rp_kgp(fluid, P/MPa)*W/(m*K)
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# Example
fluid := "WATER.fld"
# Pressures (psi) | Temperatures (°F)
p1 := 200*psi
p4 := 5000*psi
t1 := 35 °F, 45 °F .. 1500 °F
p2 := 1000*psi
p5 := 10000*psi
T_c := rp_tcrit(fluid, 0)*K
p3 := 3000*psi
p6 := 14500*psi
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