# Chapter 4 : Fluid Properties
## RefProp 2.0
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## 4.11  Viscosity, μ
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# Viscosity is a property derived out of the study of Newtonian fluid mechanics. To analyze fluid motion, it is necessary to express the resistive forces in terms of velocity. The resistance to the shearing motion of flow is given by viscosity. It is used in determining dimensionless parameters (i.e. Reynold's number, etc.) as well as in many empirical correlations for heat transfer and fluid flow.
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# Functions that return Viscosity
rp_mutp(fluid, t, p)
# Obtains absolute (dynamic) viscosity of superheated vapor or compressed liquid in μPa-sec as a function of temperature (t) in K and Pressure (p) in MPa.
rp_muft(fluid, t)  # Obtains absolute (dynamic) viscosity of saturated liquid in μPa-sec as a function of Temperature (t) in K.
rp_mufp(fluid, p)  # Obtains absolute (dynamic) viscosity of saturated liquid in μPa-sec as a function of Pressure (p) in MPa.
rp_mugt(fluid, t)  # Obtains absolute (dynamic) viscosity of saturated vapor in μPa-sec as a function of Temperature (t) in K.
rp_mugp(fluid, p)  # Obtains absolute (dynamic) viscosity of saturated vapor in μPa-sec as a function of Pressure (p) in MPa.
# NOTE : The first parameter in all of these functions is a "fluid string" variable that identifies the fluid material to be used for the property calculations.
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# Application of Units
μ_tp(fluid, T, P) := rp_mutp(fluid, T/K, P/MPa)*μPa*s
μPa ≡ 10^-6*Pa
μ_ft(fluid, T) := rp_muft(fluid, T/K)*μPa*s
μ_gt(fluid, T) := rp_mugt(fluid, T/K)*μPa*s
μ_fp(fluid, P) := rp_mufp(fluid, P/MPa)*μPa*s
μ_gp(fluid, P) := rp_mugp(fluid, P/MPa)*μPa*s
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# Example
fluid := "WATER.fld"
# Pressures | Temperatures
p1 := 200*psi
p4 := 5000*psi
t1 := 35 °F, 45 °F .. 5000 °F
p2 := 1000*psi
p5 := 10000*psi
T_c := rp_tcrit(fluid, 0)*K
p3 := 3200*psi
p6 := 14500*psi
T_c = 705.103 °F
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