# Chapter 4 : Fluid Properties
## RefProp 2.0
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## 4.1 Density, ρ
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# The fluid density describes the mass of a unit volume of fluid at a given state and is expressed in units of kg*m^-3.  Since the helmholtz equation is a function of temperature and density, calculating density in terms of temperature and pressure requires an iterative solution.
# solved equation:
p == ρ^2*(d/dρ(f))[T]
# Specific volume can be evaluated as the inverse of the density.
#
# This iterative density calculation provides the basis for all other thermodynamic property calculations, which can be evaluated directly in terms of Temperature and Density.
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# Functions that return Density (rho)
rp_rhotp(fluid, t, p)  # Obtains density of superheated vapor or compressed liquid in kg/m³ as a function of temperature (t) in K and Pressure (p) in MPa.
rp_rhoft(fluid, t)  # Obtains density of saturated liquid in kg/m³ as a function of temperature (t) in K.
rp_rhofp(fluid, p)  # Obtains density of saturated liquid in kg/m³ as a function of pressure (p) in MPa.
rp_rhogt(fluid, t)  # Obtains density of saturated vapor in kg/m³ as a function of temperature (t) in K.
rp_rhogp(fluid, p)  # Obtains density of saturated vapor in m³/kg as a function of pressure (p) in MPa.
# NOTE : The first parameter in all of these functions is a "fluid string" variable that identifies the fluid material to be used for the property calculations.
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# Application of Units
v_tp(fluid, t, p) := (rp_rhotp(fluid, t/K, p/MPa)*kg/m^3)^-1
v_ft(fluid, t) := (rp_rhoft(fluid, t/K)*kg/m^3)^-1
v_gt(fluid, t) := (rp_rhogt(fluid, t/K)*kg/m^3)^-1
v_fp(fluid, p) := (rp_rhofp(fluid, p/MPa)*kg/m^3)^-1
v_gp(fluid, p) := (rp_rhogp(fluid, p/MPa)*kg/m^3)^-1
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# Example
fl := "WATER.fld"
T_c := rp_tcrit(fl, 0)*K
P_sat(T) := rp_psatt(fl, T*K^-1)*MPa
T_t := rp_ttrip(fl, 0)*K
# Temperatures | Pressures
n := 200
p1 := 2*psi
p4 := 3208*psi
ΔT := (T_c - T_t)*1/n
p2 := 20*psi
p5 := 10000*psi
t1 := T_t, T_t + ΔT .. 2*T_c
p3 := 200*psi
p6 := 14500*psi
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