# Chapter 4 : Fluid Properties
## RefProp 2.0
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## 4.2 Specific Internal Energy, u
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# Internal energy represents the total energy stored in a fluid.  It is the sum of the molecular kinetic energy and the molecular kinetic energy within the fluid and has the units of kJ/kg.  The internal energy of a substance does not include any energy that it may posses as a result of its position or movement as a whole.  Rather it refers to the energy of the molecules making up the substance.
# Internal energy is calculated from the helmholtz free energy surface, f(ρ, T), as follows..
# Internal Energy:
u == f - T*(d/dT(f))[ρ]
# The total internal energy of a fluid can not be measured.  However, changes in internal energy calculated from a reference state can be evaluated.  For water, this reference state is saturated liquid at 0.01°C (273.16 K). At the reference state, internal energy, u, is set to zero (as demonstrated in the example below).
# Evaluate at reference state:
T_ref := 273.16*K
fluid := "WATER.fld"
rp_uft(fluid, T_ref/K)*kJ/kg = 1.50041e-10 kJ/kg
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# Functions that return Internal Energy
rp_utp(fluid, t, p)  # Obtains internal energy of superheated vapor or compressed liquid in kJ/kg as a function of temperature (t) in K and Pressure (p) in MPa.
rp_uft(fluid, t)  # Obtains internal energy of saturated liquid in kJ/kg as a function of temperature (t) in K.
rp_ufp(fluid, p)  # Obtains internal energy of saturated liquid in kJ/kg as a function of pressure (p) in MPa.
rp_ugt(fluid, t)  # Obtains internal energy of saturated vapor in kJ/kg as a function of temperature (t) in K.
rp_ufp(fluid, p)  # Obtains internal energy of saturated liquid in kJ/kg as a function of pressure (p) in MPa.
# NOTE : The first parameter in all of these functions is a "fluid string" variable that identifies the fluid material to be used for the property calculations.
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# Application of Units
# additional unit:
u_tp(fluid, t, p) := rp_utp(fluid, t/K, p/MPa)*kJ/kg
kJ ≡ 1000*J
u_ft(fluid, t) := rp_uft(fluid, t/K)*kJ/kg
u_gt(fluid, t) := rp_ugt(fluid, t/K)*kJ/kg
u_fp(fluid, p) := rp_ufp(fluid, p/MPa)*kJ/kg
u_gp(fluid, p) := rp_ugp(fluid, p/MPa)*kJ/kg
P_sat(t) := rp_psatt(fluid, t/K)*MPa
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# Example
fl := "WATER.fld"
T_c := rp_tcrit(fl, 0)*K
T_t := rp_ttrip(fl, 0)*K
# Temperatures | Pressures
n := 200
p1 := 2*psi
p4 := 3208*psi
ΔT := (T_c - T_t)*1/n
p2 := 20*psi
p5 := 10000*psi
t1 := T_t, T_t + ΔT .. 2*T_c
p3 := 200*psi
p6 := 14500*psi
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