# Chapter 4 : Fluid Properties
## RefProp 2.0
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## 4.3 Specific Enthalpy, h
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# Enthalpy is defined (out of convenience) as the sum of the internal energy, u and the pressure-volume product, Pν and has the units of kJ/kg:
h == u + P*ν
# Internally, enthalpy is calculated from the helmholtz free energy surface, f(ρ, T), in the following manner:
# specific enthalpy:
h == f - T*(d/dT(f))[ρ] + ρ*(d/dρ(f))[T]
# Keep in mind that enthalpy is a property, and its use in calculating internal energy at the same state is not dependent on any processes that may be occurring. Values of enthalpy are relative to an arbitrarily chosen reference state. For water, this reference state is saturated liquid at 0.01°C (273.16 K). At the reference state, internal energy, u, is set to zero, leaving  h == P*ν
# (as demonstrated in the example below).
# units:
kJ := 1000*J
fluid := "WATER.fld"
# Evaluate at reference state:
T_ref := 273.16*K
P_sat(fluid, T) := rp_psatt(fluid, T*K^-1)*MPa
h_f(fluid, t) := rp_hft(fluid, t/K)*kJ/kg
v_f(fluid, t) := (rp_rhoft(fluid, t/K)*kg/m^3)^-1
h_f(fluid, T_ref) - P_sat(fluid, T_ref)*v_f(fluid, T_ref) = -1.47748e-10 kJ/kg
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# Functions that return Enthalpy
rp_htp(t, p)  # Obtains enthalpy of superheated vapor or compressed liquid in kJ/kg as a function of temperature (t) in K and Pressure (p) in MPa.
rp_hft(t)  # Obtains enthalpy of saturated liquid in kJ/kg as a function of temperature (t) in K.
rp_hfp(p)  # Obtains enthalpy of saturated liquid in kJ/kg as a function of pressure (p) in MPa.
rp_hgt(t)  # Obtains enthalpy of saturated vapor in kJ/kg as a function of temperature (t) in K.
rp_hgp(p)  # Obtains enthalpy of saturated vapor in kJ/kg as a function of pressure (p) in MPa.
# NOTE : The first parameter in all of these functions is a "fluid string" variable that identifies the fluid material to be used for the property calculations.
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# Application of Units
h_tp(fluid, t, p) := rp_htp(fluid, t/K, p/MPa)*kJ/kg
h_ft(fluid, t) := rp_hft(fluid, t/K)*kJ/kg
h_gt(fluid, t) := rp_hgt(fluid, t/K)*kJ/kg
h_fp(fluid, p) := rp_hfp(fluid, p/MPa)*kJ/kg
h_gp(fluid, p) := rp_hgp(fluid, p/MPa)*kJ/kg
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# Example
T_c := rp_tcrit(fluid, 0)*K
fluid = "WATER.fld"
T_t := rp_ttrip(fluid, 0)*K
# Temperatures | Pressures
n := 200
p1 := 2*psi
p4 := 3200*psi
ΔT := (T_c - T_t)*1/n
p2 := 20*psi
p5 := 10000*psi
t1 := T_t, T_t + ΔT .. 2*T_c
p3 := 200*psi
p6 := 14500*psi
ts := T_t, T_t + ΔT .. T_c
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