# Chapter 4 : Fluid Properties
## RefProp 2.0
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## 4.4 Specific Entropy, s
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# For a reversible cyclical process where temperature varies during heat absorption and rejection,
integral(1/T, Q) == 0  # is true.
# Since this is true, it follows that the above integral is path independent. This integral has been defined as the entropy change, s, and has units of kJ/kg-K.  The entropy of  water is only dependent on its state. Like internal energy,  entropy, s,  is defined as zero for saturated liquid at 0.01 °C (273.16 K).
# The specific entropy of a fluid is determined from the helmholtz free energy surface, f(ρ, T), by the following equation.
# Specific Entropy:
s == -(d/dT(f))[ρ]
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# Functions that return Specific Entropy
rp_stp(fluid, t, p)
# Obtains entropy of superheated vapor or compressed liquid in kJ/kg-K as a function of temperature (t) in K and Pressure (p) in MPa.  fluid is the fluid string for the requested material.
rp_sft(fluid, t)  # Obtains entropy of saturated liquid in kJ/kg-K as a function of temperature (t) in K.
rp_sfp(fluid, p)  # Obtains entropy of saturated liquid in kJ/kg-K as a function of pressure (p) in MPa.
rp_sgt(fluid, t)  # Obtains entropy of saturated vapor in kJ/kg-K as a function of temperature (t) in K.
rp_sgt(fluid, p)  # Obtains entropy of saturated vapor in kJ/kg-K as a function of pressure (p) in MPa.
# NOTE : The first parameter in all of these functions is a "fluid string" variable that identifies the fluid material to be used for the property calculations.
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# Application of Units
s_tp(fluid, t, p) := rp_stp(fluid, t/K, p/MPa)*kJ/(kg*K)
kJ ≡ 1000*J
s_fp(fluid, p) := rp_sfp(fluid, p/MPa)*kJ/(kg*K)
s_ft(fluid, t) := rp_sfp(fluid, t/K)*kJ/(kg*K)
s_gp(fluid, p) := rp_sgp(fluid, p/MPa)*kJ/(kg*K)
s_gt(fluid, t) := rp_sgt(fluid, t/K)*kJ/(kg*K)
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# Example
fluid := "WATER.fld"
T_c := rp_tcrit(fluid, 0)*K
T_t := rp_ttrip(fluid, 0)*K
# Temperatures | Pressures
n := 200
p1 := 2*psi
p4 := 3208*psi
ΔT := (T_c - T_t)*1/n
p2 := 20*psi
p5 := 10000*psi
t1 := T_t, T_t + ΔT .. 2*T_c
p3 := 200*psi
p6 := 14500*psi
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