# Chapter 4 : Fluid Properties
## RefProp 2.0
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## 4.5 Isobaric Specific Heat, Cp
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# Isobaric Specific Heat is defined as the rate of change of enthalpy of a unit mass of material with respect to temperature at a given constant pressure (isobaric):
c_p == (d/dT(h))[p] == -T*(d^2/dT^2(f))[V, dA/dV[T]]  # (in terms of the Helmhotz free energy, f)
# If heat, Q, is slowly added to a material, allowing the material to expand reversibly at constant pressure, the heat added, Q, is related to the change in material temperature by the relation:
Q == integral(Cp, T)[p] == ΔH
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# Functions that return Isobaric Specific Heat
rp_cptp(fluid, t, p)
# Obtains Specific isobaric Heat Capacity (Cv) of superheated vapor or compressed liquid in kJ/kg-K as a function of temperature (t) in K and Pressure (p) in MPa.
rp_cpft(fluid, t)  # Obtains Specific isobaric Heat Capacity (Cp) of saturated liquid in kJ/kg-K as a function of temperature (t) in K.
rp_cpfp(fluid, p)  # Obtains Specific isobaric Heat Capacity (Cp) of saturated liquid in kJ/kg-K as a function of Pressure (p) in MPa.
rp_cpgt(fluid, t)  # Obtains Specific isobaric Heat Capacity (Cp) of saturated vapor in kJ/kg-K as a function of temperature (t) in K.
rp_cpgp(fluid, p)  # Obtains Specific isobaric Heat Capacity (Cp) of saturated vapor in kJ/kg-K as a function of Pressure (p) in MPa.
# NOTE : The first parameter in all of these functions is a "fluid string" variable that identifies the fluid material to be used for the property calculations.
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# Application of Units
C_ptp(fluid, t, p) := rp_cptp(fluid, t/K, p/MPa)*kJ/(kg*K)
kJ ≡ 1000*J
C_pft(fluid, t) := rp_cpft(fluid, t/K)*kJ/(kg*K)
C_pgt(fluid, t) := rp_cpgt(fluid, t/K)*kJ/(kg*K)
C_pfp(fluid, p) := rp_cpfp(fluid, p/MPa)*kJ/(kg*K)
C_pgp(fluid, p) := rp_cpgp(fluid, p/MPa)*kJ/(kg*K)
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# Example
fluid := "WATER.fld"
T_c := rp_tcrit(fluid, 0)*K
T_t := rp_ttrip(fluid, 0)*K
T_c = 705.103 °F
# Temperatures | Pressures
n := 200
p1 := 1000*psi
p4 := 7500*psi
ΔT := (T_c - T_t)*1/n
p2 := 3200*psi
p5 := 10000*psi
t1 := T_t, T_t + ΔT .. 2*T_c
p3 := 5000*psi
p6 := 14500*psi
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