# Chapter 4 : Fluid Properties
## RefProp 2.0
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## 4.6  Isochoric (Isometric) Specific Heat, Cv
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# Isochoric Specific Heat is defined as the rate of change of enthalpy of a unit mass of material with respect to temperature at a given constant volume (isochoric):
c_v == (d/dT(u))[V]
# The expression above is evaluated using the internal energy, u.  A similar expression can be derived in terms of the Helmholtz free energy.
#
# If heat, Q, is slowly added to a material while keeping the volume constant, the heat added, Q, is related to the change in material temperature by the relation:
Q == integral(Cv, T)[v] == ΔU
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# Functions that return Isobaric Specific Heat
rp_cvtp(fluid, t, p)
# Obtains Specific isochoric Heat Capacity (Cv) of superheated vapor or compressed liquid in kJ/kg-K as a function of temperature (t) in K and Pressure (p) in MPa.
rp_cvfp(fluid, p)  # Obtains Specific isochoric Heat Capacity (Cv) of saturated liquid in kJ/kg-K as a function of Pressure (p) in MPa.
rp_cvfp(fluid, p)  # Obtains Specific isochoric Heat Capacity (Cv) of saturated liquid in kJ/kg-K as a function of Pressure (p) in MPa.
rp_cvgp(fluid, p)  # Obtains Specific isochoric Heat Capacity (Cv) of saturated vapor in kJ/kg-K as a function of Pressure (p) in MPa.
rp_cvgp(fluid, p)  # Obtains Specific isochoric Heat Capacity (Cv) of saturated vapor in kJ/kg-K as a function of Pressure (p) in MPa.
# NOTE : The first parameter in all of these functions is a "fluid string" variable that identifies the fluid material to be used for the property calculations.
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# Application of Units
C_vtp(fluid, t, p) := rp_cvtp(fluid, t/K, p/MPa)*kJ/(kg*K)
kJ ≡ 1000*J
C_vft(fluid, t) := rp_cvft(fluid, t/K)*kJ/(kg*K)
C_vgt(fluid, t) := rp_cvgt(fluid, t/K)*kJ/(kg*K)
C_vfp(fluid, p) := rp_cvfp(fluid, p/MPa)*kJ/(kg*K)
C_vgp(fluid, p) := rp_cvgp(fluid, p/MPa)*kJ/(kg*K)
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# Example
fluid := "WATER.fld"
T_c := rp_tcrit(fluid, 0)*K
T_t := rp_ttrip(fluid, 0)*K
# Temperatures | Pressures
n := 200
p1 := 1000*psi
p4 := 7500*psi
ΔT := (T_c - T_t)*1/n
p2 := 3200*psi
p5 := 10000*psi
t1 := T_t, T_t + ΔT .. 2*T_c
p3 := 5000*psi
p6 := 14500*psi
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