# Chapter 4 : Fluid Properties
## RefProp 2.0
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## 4.7  Speed of Sound, w
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# The speed of sound in a fluid is related to the specific volume and the fluid compressibility by the following thermodynamic relationship:
w^2 == -v^2*(d/dv(P))[S] == (d/dρ(P))[S]
# RefProp evaluates this differential using the Helmholtz free energy expression.
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# Functions that return Speed of Sound
rp_wtp(fluid, t, p)
# Obtains speed of sound through superheated vapor or compressed liquid in m/s as a function of temperature (t) in K and Pressure (p) in MPa.
rp_wft(fluid, t)  # Obtains speed of sound through saturated liquid in m/s as a function of Temperature (t) in K.
rp_wfp(fluid, p)  # Obtains speed of sound through saturated liquid in m/s as a function of Pressure (p) in MPa.
rp_wgt(fluid, t)  # Obtains speed of sound through saturated vapor in m/s as a function of Temperature (t) in K.
rp_wgp(fluid, p)  # Obtains speed of sound through saturated vapor in m/s as a function of Pressure (p) in MPa.
# NOTE : The first parameter in all of these functions is a "fluid string" variable that identifies the fluid material to be used for the property calculations.
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# Application of Units
w_tp(fluid, t, p) := rp_wtp(fluid, t/K, p/MPa)*m/s
w_ft(fluid, t) := rp_wft(fluid, t/K)*m/s
w_gt(fluid, t) := rp_wgt(fluid, t/K)*m/s
w_fp(fluid, p) := rp_wfp(fluid, p/MPa)*m/s
w_gp(fluid, p) := rp_wgp(fluid, p/MPa)*m/s
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# Example
fluid := "WATER.fld"
T_c := rp_tcrit(fluid, 0)*K
T_t := rp_ttrip(fluid, 0)*K
# Temperatures (°F) | Pressures (psi)
n := 200
p1 := 200*psi
p4 := 5000*psi
ΔT := (T_c - T_t)*1/n
p2 := 1000*psi
p5 := 10000*psi
p3 := 3200*psi
p6 := 14500*psi
T2 := T_t, T_t + ΔT .. 2*T_c
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