# Chapter 4 : Fluid Properties
## RefProp 2.0
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## 4.8  Saturation Curve
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# The Saturation Curve is defined as the Temperature / Pressure boundary curve that separates the liquid phase from the vapor phase.  This curve starts at the Triple Point (where the solid, liquid, and vapor regions meet) to the Critical Point (where the fluid becomes super-critical; neither liquid or vapor).
#
# The saturation curve and the temperature / pressure points at either end can all be retreived from the RefProp functions for any fluid.
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# Functions that return Pressure
rp_ttrip(fluid, 0)
# Obtains the triple point temperature in K.
# Requires a dummy parameter (0).
rp_ptrip(fluid, 0)
# Obtains the triple point pressure in MPa.
# Requires a dummy parameter (0).
rp_tcrit(fluid, 0)
# Obtains the critical point temperature in K.
# Requires a dummy parameter (0).
rp_pcrit(fluid, 0)
# Obtains the critical point pressure in MPa.
# Requires a dummy parameter (0).
rp_tsatp(fluid, p)  # Obtains the saturation temperature in K from the given saturation pressure (p) in MPa.  Valid from P_t to P_c.
rp_psatt(fluid, t)  # Obtains the saturation pressure in MPa from the given saturation temperature (t) in K.  Valid from T_t to T_c.
# NOTE : The first parameter in all of these functions is a "fluid string" variable that identifies the fluid material to be used for the property calculations.
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# Application of Units
P_t(fluid) := rp_ptrip(fluid, 0)*MPa
P_sat(fluid, t) := rp_psatt(fluid, t/K)*MPa
P_c(fluid) := rp_pcrit(fluid, 0)*MPa
T_t(fluid) := rp_ttrip(fluid, 0)*K
T_sat(fluid, p) := rp_tsatp(fluid, p/MPa)*K
T_c(fluid) := rp_tcrit(fluid, 0)*K
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# Example
fl := "WATER.fld"
# Temperatures
n := 1000
ΔT := (T_c(fl) - T_t(fl))*1/n
T1 := T_t(fl), T_t(fl) + ΔT .. T_c(fl)
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# Region 3
# (super-critical)
# Critical
# Point
# Region 1 (liquid)
# Region 2
# (vapor)
# Triple
# Point
