# Chapter 4 : Fluid Properties
## RefProp 2.0
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## 4.9  Surface Tension, σ
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# Surface Tension is a property that describes the work required to create a unit surface area of liquid water. Its units are N-m/m² or N/m and it is a function of temperature alone (decreases with increasing temperature). Surface Tension is important in the formation of bubbles and in the study of atomization.  As this is a property of the vapor / liquid interface, it is only defined along the saturation curve and has no meaning in the single phase regions.
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# Functions that return Surface Tension
rp_surften(fluid, t)  # Obtains surface tension of the fluid in kg/s² as a function of temperature (t) in K.
# NOTE : The first parameter in all of these functions is a "fluid string" variable that identifies the fluid material to be used for the property calculations.
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# Example
fluid := "WATER.fld"
# Temperatures (°F)
σ(T) := rp_surften(fluid, T/K)*kg/s^2
t1 := 30 °F, 32 °F .. 800 °F
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