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# Appendix B - RefProp Function Verification
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# The RefProp functions have been tested and verified against other RefProp implementations and published data.  Verification is based on the following criteria.
# Continuity Check
#
# All supplied functions have been plotted over the valid property limits for all of the fluids in the NIST RefProp Library to ensure continuity of the data with no areas of non-convergence of the underlying NIST RefProp functions.  Water, CO2, and most of the room temperature gasses have been shown to be continuous over the full Temperature and Pressure limits of the models.  This includes ranges tightly focused around the critical point (Figure 1).
# [reference: RefProp_units.mcdx]
fl := "CO2.fld"
p_c := P_c(fl, 0) = 7.3773 MPa
t_t := T_t(fl, 0) = 216.592 K
t_c := T_c(fl, 0) = 304.128 K
Δt := (t_c - t_t)/100
t := t_c - 5 K, t_c - 4.99 K .. t_c + 5 K
t_s := t_c - 5 K, t_c - 4.99 K .. t_c
p := [
    p_c - 0.25 MPa;
    p_c - 0.20 MPa;
    p_c - 0.15 MPa;
    p_c - 0.10 MPa;
    p_c - 0.05 MPa;
    p_c;
    p_c + 0.05 MPa;
    p_c + 0.10 MPa;
    p_c + 0.15 MPa;
    p_c + 0.20 MPa;
    p_c + 0.25 MPa
]
# Compact unit def:
kg/m³ := kg/m^3
# [chart]
    X[1] := t K^-1
    Y[1] := ρ_tp(fl, t, p[0]) kg/m³
    X[6] := t K^-1
    Y[6] := ρ_tp(fl, t, p[5]) kg/m³
    X[7] := t K^-1
    Y[7] := ρ_tp(fl, t, p[6]) kg/m³
    X[2] := t K^-1
    Y[2] := ρ_tp(fl, t, p[1]) kg/m³
    X[8] := t K^-1
    Y[8] := ρ_tp(fl, t, p[7]) kg/m³
    X[12] := t_s K^-1
    Y[12] := ρ_ft(fl, t_s) kg/m³
    X[3] := t K^-1
    Y[3] := ρ_tp(fl, t, p[2]) kg/m³
    X[9] := t K^-1
    Y[9] := ρ_tp(fl, t, p[8]) kg/m³
    X[13] := t_s K^-1
    Y[13] := ρ_gt(fl, t_s) kg/m³
    X[4] := t K^-1
    Y[4] := ρ_tp(fl, t, p[3]) kg/m³
    X[10] := t K^-1
    Y[10] := ρ_tp(fl, t, p[9]) kg/m³
    X[5] := t K^-1
    Y[5] := ρ_tp(fl, t, p[4]) kg/m³
    X[11] := t K^-1
    Y[11] := ρ_tp(fl, t, p[10]) kg/m³
# Figure 1 : Continuity of Calculated Density of Carbon Dioxide
# in the Vicinity of the Critical Point
# When using any fluid from RefProp (or any properties library), care should be taken to verify the continuity over the region of interest, and accuracy of the saturation curve as it approaches the critical point; similar to Figure 1 and Figure 2.
fl := "Benzene.fld"
t_c := T_c(fl, 0) = 562.02 K
p_c := P_c(fl, 0) = 4.90728 MPa
CASN := rp_getcasn(fl, 0)
t := t_c, t_c - 0.02 K .. t_c - 1 K
NIST := rp_getNIST(0)
fluid := rp_getname(fl, 0)
# [chart]
    X[1] := t*K^-1
    Y[1] := P_sat(fl, t)*MPa^-1
    X[2] := t_c*K^-1
    Y[2] := p_c*MPa^-1
NIST = "NIST RefProp Library: Version 10.0.0.0"
fluid = "Benzene"
CASN = "71-43-2"
# Figure 2 : Continuity of Benzene Saturation Curve
# up to the Critical Point
# Accuracy
#
# Comparisons have been made for CO_2 property results from the Mathcad DLL and the NIST provided Excel Add-in at selected Temperature and Pressure point locations.  These comparisons (Figure 3) show that the two implementations agree to 5 significant figures or better on the calculated thermodynamic and transport properties.  This comparison provides verification that the Mathcad Add-In is at least as accurate as the NIST Library, but makes no claim for the accuracy of the NIST Library itself.
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# Figure 3 : Mathcad Add-In Accuracy Relative to the NIST MS-Excel Add-In
# Since the RefProp property models for Water are taken from the IAPWS-95 Steam/Water Property Formulation for General and Scientific Use, the Mathcad predicted water properties were compared directly with the IAPWS-95 published verification values.  Thus providing verification that the Mathcad Add-In implementation functioning as expected.  The IAPWS-95 release document provides a table of property values over a matrix of state points (Figure 4) lying in all liquid/vapor/super-critical phase regions of the phase diagram.
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# Figure 4 : IAPWS-95 Recommended Verification Points
# Using the direct functions of Temperature and Density, the predicted pressures agree with the published verification values to 6 significant figures or better.  All other properties ( C_v, w, and S ) agreed to 9 significant figures or better, which is the precision of the published values.
#
# Indirectly using the functions of Temperature and Pressure to calculate Density, requires an iterative procedure within the NIST RefProp Library that solves the Pressure equation for Density to a selected tolerance.  This function evaluates Density to 6 significant figures (or better) of the published values.  Since this Density calculation is used as a first step in the calculation of all other properties as a function of Temperature and Pressure, the remaining properties are also limited to an accuracy of 6 significant figures.  According to the IAPWS-95 documentation, the formulation itself (and hence the verification values) is only accurate to 5 significant figures or less in the liquid region, and 4 significant figures or less in the vapor and super-critical regions.
