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# Appendix C  Unit Functions Reference
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# NIST RefProp Functions with Appropriately Applied Units
# (For Mathcad Prime and Version 2.0 or later of the RefProp Add-In)
# Most property routines listed below require a fluid string, fl, to specify the fluid properties to use.  Make calls to rp_property functions with one of the RefProp fluids (e.g. fl := "CO2.fld") or mixtures.  Fluid names are not case sensitive.
# Add-in Utility Functions
# Function to get the version string:
Refprop_Addin_Version(i) := rp_getvers(i)
isV10? := rp_getRPnum(0) ≥ 10 = 1
NIST_Refprop_Version(i) := rp_getNIST(i)
# Legacy API Calls
# Fluid Information Functions
Name(fl, component) := rp_getname(fl, component)  # Returns a string with the full fluid name
CASN(fl, component) := rp_getcasn(fl, component)  # Returns a string containing the CAS number
# The following functions all retrieve specific properties and constants.  The parameters to each function (unless it's a component number) should have appropriate Mathcad units applied.  Each of these functions will convert the passed parameters to the units expected by the RefProp functions, and return values with appropriate units applied.  Temperatures should always be passed with absolute temperature units of K or R.
# Basic Physical Constants by individual component (component = 1 for a pure fluid)
# Molecular Weight
WM(fl, comp) := rp_wmol(fl, comp)*gm/mol
R_g(fl, comp) := rp_rgas(fl, comp)*J*mol^-1*K^-1
# Critical Point | Triple Point
# Temperature
T_c(fl, component) := rp_tcrit(fl, component)*K
T_t(fl, component) := rp_ttrip(fl, component)*K
# Pressure
P_c(fl, component) := rp_pcrit(fl, component)*MPa
P_t(fl, component) := rp_ptrip(fl, component)*MPa
# Density
ρ_c(fl, component) := rp_rhocrit(fl, component)*kg/m^3
# Temperature and Pressure Functions along the Saturation Curve
T_sat(fl, P) := rp_tsatp(fl, P/MPa)*K
P_sat(fl, T) := rp_psatt(fl, T/K)*MPa
T_satf(fl, P) := rp_tsatpf(fl, P/MPa)*K
P_satf(fl, T) := rp_psattf(fl, T/K)*MPa
T_satg(fl, P) := rp_tsatpg(fl, P/MPa)*K
P_satg(fl, T) := rp_psattg(fl, T/K)*MPa
# Cricondentherm and Cricondenbar Temperature and Pressure Functions
# along the Saturation Curve
T_maxT(fl) := rp_maxX(fl, "T")[0] K
T_maxP(fl) := rp_maxX(fl, "P")[0] K
P_maxT(fl) := rp_maxX(fl, "T")[1] MPa
P_maxP(fl) := rp_maxX(fl, "P")[1] MPa
LIMITS(fl, mStr) := vectorize(rp_limits(fl, mStr)*[K; K; kg m^-3; MPa])
# Thermodynamic Properties as functions of Temperature and Pressure
# Fluid function subscripts indicate the phase region and the independent parameter to be used.
# A subscript of f indicates saturated liquid (fluid) and a subscript of g indicates saturated vapor (gas). If neither f or g is used, the function returns either subcooled liquid or superheated vapor values.  These functions are only defined between the triple point and the critical point, and will return an error otherwise.
#
# A second subscript of t, p, or both indicates the independent parameter that should be passed.  Thus, ρ_fp would return the saturated liquid density as a function of the saturation pressure, p.  Alternatively, ρ_tp will return the general subcooled liquid or superheated vapor density as a function of both temperature, t, and pressure, p.
# Density, ρ
# Saturated Liquid as a function of temperature:
ρ_ft(fl, T) := rp_rhoft(fl, T/K)*kg/m^3
# Saturated Vapor as a function of temperature:
ρ_gt(fl, T) := rp_rhogt(fl, T/K)*kg/m^3
# Saturated Liquid as a function of temperature:
ρ_fp(fl, P) := rp_rhofp(fl, P/MPa)*kg/m^3
# Saturated Vapor as a function of temperature:
ρ_gp(fl, P) := rp_rhogp(fl, P/MPa)*kg/m^3
# Subcooled Liquid or Superheated Vapor as a
# function of both temperature and pressure:
ρ_tp(fl, T, P) := rp_rhotp(fl, T/K, P/MPa)*kg/m^3
# Enthalpy, h
h_ft(fl, T) := rp_hft(fl, T/K)*kJ/kg
h_gt(fl, T) := rp_hgt(fl, T/K)*kJ/kg
h_fp(fl, P) := rp_hfp(fl, P/MPa)*kJ/kg
h_gp(fl, P) := rp_hgp(fl, P/MPa)*kJ/kg
h_tp(fl, T, P) := rp_htp(fl, T/K, P/MPa)*kJ/kg
# Entropy, s
s_ft(fl, T) := rp_sft(fl, T/K)*kJ/(kg*K)
s_gt(fl, T) := rp_sgt(fl, T/K)*kJ/(kg*K)
s_fp(fl, P) := rp_sfp(fl, P/MPa)*kJ/(kg*K)
s_gp(fl, P) := rp_sgp(fl, P/MPa)*kJ/(kg*K)
s_tp(fl, T, P) := rp_stp(fl, T/K, P/MPa)*kJ/(kg*K)
# Internal Energy, u
u_fp(fl, P) := rp_ufp(fl, P/MPa)*kJ/kg
u_gp(fl, P) := rp_ugp(fl, P/MPa)*kJ/kg
u_ft(fl, T) := rp_uft(fl, T/K)*kJ/kg
u_gt(fl, T) := rp_ugt(fl, T/K)*kJ/kg
u_tp(fl, T, P) := rp_utp(fl, T/K, P/MPa)*kJ/kg
# Isobaric Specific Heat, Cp
Cp_fp(fl, P) := rp_cpfp(fl, P/MPa)*kJ/(kg*K)
Cp_gp(fl, P) := rp_cpgp(fl, P/MPa)*kJ/(kg*K)
Cp_ft(fl, T) := rp_cpft(fl, T/K)*kJ/(kg*K)
Cp_gt(fl, T) := rp_cpgt(fl, T/K)*kJ/(kg*K)
Cp_tp(fl, T, P) := rp_cptp(fl, T/K, P/MPa)*kJ/(kg*K)
# Isochoric Specific Heat, Cv
Cv_fp(fl, P) := rp_cvfp(fl, P/MPa)*kJ/(kg*K)
Cv_gp(fl, P) := rp_cvgp(fl, P/MPa)*kJ/(kg*K)
Cv_ft(fl, T) := rp_cvft(fl, T/K)*kJ/(kg*K)
Cv_gt(fl, T) := rp_cvgt(fl, T/K)*kJ/(kg*K)
Cv_tp(fl, T, P) := rp_cvtp(fl, T/K, P/MPa)*kJ/(kg*K)
# Sonic Velocity, w
w_fp(fl, P) := rp_wfp(fl, P/MPa)*m/s
w_gp(fl, P) := rp_wgp(fl, P/MPa)*m/s
w_ft(fl, T) := rp_wft(fl, T/K)*m/s
w_gt(fl, T) := rp_wgt(fl, T/K)*m/s
w_tp(fl, T, P) := rp_wtp(fl, T/K, P/MPa)*m/s
# Transport Properties as Functions of Temperature and Pressure
# Thermal Conductivity, k
k_fp(fl, P) := rp_kfp(fl, P/MPa)*W/(m*K)
k_gp(fl, P) := rp_kgp(fl, P/MPa)*W/(m*K)
k_ft(fl, T) := rp_kft(fl, T/K)*W/(m*K)
k_gt(fl, T) := rp_kgt(fl, T/K)*W/(m*K)
k_tp(fl, T, P) := rp_ktp(fl, T/K, P/MPa)*W/(m*K)
# Fluid Viscosity, μ
μ_fp(fl, P) := rp_mufp(fl, P/MPa)*μPa*s
μ_gp(fl, P) := rp_mugp(fl, P/MPa)*(μPa*s)
μ_ft(fl, T) := rp_muft(fl, T/K)*(μPa*s)
μ_gt(fl, T) := rp_mugt(fl, T/K)*(μPa*s)
μ_tp(fl, T, P) := rp_mutp(fl, T/K, P/MPa)*(μPa*s)
# Some Additional Property Functions
# Surface Tension
σ_t(fl, T) := rp_surften(fl, T/K)*N/m
# Latent Heat
h_fg(fl, t) := h_gt(fl, t) - h_ft(fl, t)
# Vapor Quality
x_th(f, t, h) := min(max((h - h_ft(f, t))/(h_gt(f, t) - h_ft(f, t)), 0), 1.0)
x_ph(f, p, h) := min(max((h - h_fp(f, p))/(h_gp(f, p) - h_fp(f, p)), 0), 1.0)
x_ts(f, t, s) := min(max((s - s_ft(f, t))/(s_gt(f, t) - s_ft(f, t)), 0), 1.0)
x_ps(f, p, s) := min(max((s - s_fp(f, p))/(s_gp(f, p) - s_fp(f, p)), 0), 1.0)
x_tρ(f, t, ρ) := min(max((ρ - ρ_ft(f, t))/(ρ_gt(f, t) - ρ_ft(f, t)), 0), 1.0)
x_pρ(f, p, ρ) := min(max((ρ - ρ_fp(f, p))/(ρ_gp(f, p) - ρ_fp(f, p)), 0), 1.0)
x_tu(f, t, u) := min(max((u - u_ft(f, t))/(u_gt(f, t) - u_ft(f, t)), 0), 1.0)
x_pu(f, p, u) := min(max((u - u_fp(f, p))/(u_gp(f, p) - u_fp(f, p)), 0), 1.0)
# 2-phase Properties
h_tx(f, t, x) := h_ft(f, t)*(1 - x) + h_gt(f, t)*x
h_px(f, p, x) := h_fp(f, p)*(1 - x) + h_gp(f, p)*x
s_tx(f, t, x) := s_ft(f, t)*(1 - x) + s_gt(f, t)*x
s_px(f, p, x) := s_fp(f, p)*(1 - x) + s_gp(f, p)*x
u_tx(f, t, x) := u_ft(f, t)*(1 - x) + u_gt(f, t)*x
u_px(f, p, x) := u_fp(f, p)*(1 - x) + u_gp(f, p)*x
ρ_tx(f, t, x) := (ρ_ft(f, t)^-1*(1 - x) + ρ_gt(f, t)^-1*x)^-1
ρ_px(f, p, x) := (ρ_fp(f, p)^-1*(1 - x) + ρ_gp(f, p)^-1*x)^-1
Δρ_t(f, t) := ρ_ft(f, t) - ρ_gt(f, t)
Δρ_p(f, p) := ρ_fp(f, p) - ρ_gp(f, p)
# Derived Quantities
# Morton Number
Mo(f, P) := g*μ_fp(f, P)^4*Δρ_p(f, P)/(ρ_fp(f, P)^2*σ_t(f, T_sat(f, P))^3)
# Dynamic Viscosity
ν_fp(f, P) := μ_fp(f, P)/ρ_fp(f, P)
ν_gp(f, P) := μ_gp(f, P)/ρ_gp(f, P)
ν_tp(f, T, P) := μ_tp(f, T, P)/ρ_tp(f, T, P)
ν_ft(f, T) := μ_ft(f, T)/ρ_ft(f, T)
ν_gt(f, T) := μ_gt(f, T)/ρ_gt(f, T)
# This function and the next few are calculated in the add-in (C++ code) as of v. 2.1
# Prandtl Number
Pr_c(f, T, P) := μ_tp(f, T, P)*Cp_tp(f, T, P)/k_tp(f, T, P)  # ⇐
Pr_fp(f, P) := rp_prfp(f, P/MPa)
Pr_gp(f, P) := rp_prgp(f, P/MPa)
Pr_tp(f, T, P) := rp_prtp(f, T/K, P/MPa)
Pr_ft(f, T) := rp_prft(f, T/K)
Pr_gt(f, T) := rp_prgt(f, T/K)
# Coefficient of Thermal Expansion
β_fp(f, P) := rp_betafp(f, P/MPa) K^-1
β_gp(f, P) := rp_betagp(f, P/MPa) K^-1
β_tp(f, T, P) := rp_betatp(f, T/K, P/MPa) K^-1
β_ft(f, T) := rp_betaft(f, T/K) K^-1
β_gt(f, T) := rp_betagt(f, T/K) K^-1
β_c(fl, T, P) :=
    α ← -1
    α/ρ_tp(fl, T, P)*(d/dT(ρ_tp(fl, T, P)))
# Isentropic Exponent
γ_fp(f, P) := rp_gammafp(f, P/MPa)
γ_gp(f, P) := rp_gammagp(f, P/MPa)
γ_tp(f, T, P) := rp_gammatp(f, T/K, P/MPa)
γ_ft(f, T) := rp_gammaft(f, T/K)
γ_gt(f, T) := rp_gammagt(f, T/K)
γ_c(fl, T, P) := Cp_tp(fl, T, P)/Cv_tp(fl, T, P)
# Compressibility
Z_tp(fl, T, P) := rp_ztp(fl, T/K, P/MPa)
Z_ft(fl, T) := rp_zft(fl, T/K)
Z_fp(fl, P) := rp_zfp(fl, P/MPa)
Z_c(fl, comp) == rp_zcrit(fl, comp)
Z_gt(fl, T) := rp_zgt(fl, T/K)
Z_gp(fl, P) := rp_zgp(fl, P/MPa)
# Reverse Functions of Pressure/Temperature and Enthalpy/Entropy
T_ph(fl, p, h) := rp_tph(fl, p/MPa, h*kg/kJ)*K
T_hs(fl, h, s) := rp_ths(fl, h*kg/kJ, s*kg*K/kJ)*K
T_ps(fl, p, s) := rp_tps(fl, p/MPa, s*kg*K/kJ)*K
P_hs(fl, h, s) := rp_phs(fl, h*kg/kJ, s*kg*K/kJ)*MPa
P_th(fl, t, h, r) := rp_pth(fl, t/K, h*kg/kJ, r)*MPa
P_ts(fl, t, s) := rp_pts(fl, t/K, s*kg*K/kJ)*MPa
ρ_th(fl, t, h, r) := rp_rhoth(fl, t/K, h*kg/kJ, r)*kg/m^3
ρ_ts(fl, t, s) := rp_rhots(fl, t/K, s*kg*K/kJ)*kg/m^3
ρ_ph(fl, p, h) := rp_rhoph(fl, p/MPa, h*kg/kJ)*kg/m^3
ρ_ps(fl, p, s) := rp_rhops(fl, p/MPa, s*kg*K/kJ)*kg/m^3
h_ps(fl, p, s) := rp_hps(fl, p/MPa, s*kg*K/kJ)*kJ/kg
s_ph(fl, p, h) := rp_sph(fl, p/MPa, h*kg/kJ)*kJ/(kg*K)
h_ts(fl, t, h) := rp_hts(fl, t/K, h*kg*K/kJ)*kJ/kg
s_th(fl, t, h, r) := rp_sth(fl, t/K, h*kg/kJ, r)*kJ/(kg*K)
# Some Additional Unit Definitions
kJ ≡ 1000 J
debye ≡ 1*(10^-18 dyne^0.5) cm^2  # These are set globally because they are needed in the above definitions.
μPa ≡ 10^-6 Pa
# Some Additional Utility Functions
# Utility function that inputs a two-column matrix of fluids and mole fractions and outputs a formatted custom fluid string for the mixtures.
# Use to create Legacy API mixture strings. | Use to create High-Level API mixture strings.
MixString(M) :=
    O ← ORIGIN
    n ← rows(M) - (1 - O)
    s ← ""
    y ← 0
    for i ∈ O .. n
        y ← y + M[i, O + 1]
        x ← concat("[", num2str(M[i, O + 1]), "]")
        s ← concat(s, M[i, O], x)
        if i < n
            s ← concat(s, "&")
    msg ← "Composition does not sum to unity."
    if |1 - y| < 0.000001
        s
    else
        error(msg)
MixString10(M) :=
    O ← ORIGIN
    n ← rows(M) - (1 - O)
    s ← ""
    y ← 0
    for i ∈ O .. n
        y ← y + M[i, O + 1]
        x ← concat(";", num2str(M[i, O + 1]))
        s ← concat(s, M[i, O], x)
        if i < n
            s ← concat(s, ";")
    msg ← "Composition does not sum to unity."
    if |1 - y| < 0.000001
        s
    else
        error(msg)
# Usage:
C_test := ["Nitrogen", 0.4; "Oxygen", 0.3; "Argon", 0.3]
MixString(C_test) = "Nitrogen[0.4]&Oxygen[0.3]&Argon[0.3]"  # Legacy API strings
MixString10(C_test) = "Nitrogen;0.4;Oxygen;0.3;Argon;0.3"  # High-Level API strings
# Utility function that takes a mixture file name, and returns a two column matrix consisting of the individual component names and the mole fractions for each.
Composition(fluid) :=
    mf ← rp_getx(fluid)
    for i ∈ ORIGIN .. last(mf)
        cn[i] ← rp_getname(fluid, i + (1 - ORIGIN))
    return augment(cn, mf)
# REFPROP multi-purpose wrapper function (only available in REFPROP10)
# Utility functions to split strings, process units, and compress Output arrays are in the collapsed areas below.
ORIGINc := max(search("x", "x", 1), 0) = 0
# Determines if ORGIN in Strings is check under Calculation Options.
rp_Upper(str) :=
    vchars ← str2vec(str)
    for i ∈ ORIGIN .. last(vchars)
        if vchars[i] ≥ 97 and vchars[i] ≤ 122
            vchars[i] ← vchars[i] - 32
    vec2str(vchars)
# Takes a single string and converts it to upper case (all caps).  Mimics the upper() function in the DLL, but in a Mathcad user function. Except for two string function calls, should be pretty fast.
# Parses a string containing valid separators into an array of strings.  This function cannot be implemented as a Custom Function, because Custom Functions can only return arrays of scalars.  This function can be time consuming because it is using the Mathcad string manipulation functions.
#
# It has been written to handle cases when the user has modified ORIGIN from it's default value as well as when ORGIN in Strings is checked.
StrSplit(str) :=
    del ← rp_GetDel(str)
    s ← ORIGINc
    i ← ORIGIN
    if strlen(del) > 0
        ipos ← search(str, del, s)
        while ipos > ORIGINc
            if ipos > s
                svec[i] ← substr(str, s, ipos - s)
                i ← i + 1
            s ← ipos + 1
            ipos ← search(str, del, s)
        if s < strlen(str)
            svec[i] ← substr(str, s, strlen(str) - s + ORIGINc)
    else
        svec[i] ← str
    svec
# Check a vector of output string for multi-valued outputs and add 1 to total of vector elements for each found.
# Uses IsMulti(str), for quick check of multi-output strings.
# If just one string, make first element of string vector.
#
# If vector of strings, us directly
#
# Error if non-string
#
# Initialize nOut.
#
# Add 1 to count of multi-output strings if true,
# Zero otherwise
#
# Return # of multi-output strings.
MultiOut(str) :=
    if IsString(str)
        vstr[ORIGIN] ← str
    else if IsArray(str)
        vstr ← str
    else
        error("Must pass a string or a vector of strings.")
    nOut ← length(vstr)
    for i ∈ ORIGIN .. last(vstr)
        if rp_IsMulti(vstr[i])
            nOut ← nOut + 1
    nOut
# Input Unit Scaling Functions - apply scaling on a and b parameters based on hIn.
# If rp_Unit1found in input string,
# only a is used.
rp_Unit1 := ["MELT"; "SUBL"]
rp_Unit0 := ["CRIT"; "TRIP"; "NBP"; "FLAGS"; "EOS"; "SETREF"; "PATH"; "SATSPLN"]
iCount(hIn) :=
    if IsString(hIn)
        if hIn == ""
            return 0
        for i ∈ ORIGIN .. last(rp_Unit0)
            if search(hIn, rp_Unit0[i], ORIGINc) ≥ ORIGINc
                return 0
        for i ∈ ORIGIN .. last(rp_Unit1)
            if search(hIn, rp_Unit1[i], ORIGINc) ≥ ORIGINc
                return 1
        return 2
    else
        error("Must pass a string as hIn.")
# If rp_Unit0found in input string, neither a or b are used.
# Strip units on input pairs containing:
# "T P D E H S Q"
# Divide & strip SI units, and...
#
# If Pressure (P),
# scale to MPa from Pa
# ...
# If Energy (H, E, or S),
# scale to kJ from J
# Return unitless value.
rp_scale(ch, num) :=
    ret ← num/SIUnitsOf(num)
    O ← ORIGINc
    if search("P", rp_Upper(ch), O) > O - 1
        ret ← ret*10^-6
    if search("HES", rp_Upper(ch), O) > O - 1
        ret ← ret/1000
    ret
# Output Units Scaling Utility Functions
rp_getn(iU) :=
    for n ∈ ORIGIN + 3 .. ORIGIN
        pwr ← floor(mod(iU/10^(n - ORIGIN), 10))
        N[n] ← if(pwr < 5, pwr, pwr - 10)
    N
# Evaluate the four digits in passed iUcode to calculate the scaling factor N on any Output values.  Left-most (highest) digit is energy, left-middle digit is density, right-middle digit is Pressure, and Right-most (lowest) digit is temperature.  Evaluates left to right.
rp_Uval(iU) :=
    units ← 1
    if iU == -37
        iU ← 1000
    if iU > 0
        uVal ← transpose([1 K, 1 MPa, (1 kg) m^-3, (1 kJ) kg^-1])
        n ← rp_getn(iU)
        for i ∈ ORIGIN .. ORIGIN + 3
            units ← units*uVal[i]^n[i]
    else if (iU < 0)
        if (iU ≥ -17)
            uVal ← transpose([1 m/s, (1 μPa) s, 1 W/(m K), 1 N/m, 1, 1 gm/mole, 1, 1, 1 cm^2/s])
            iSU ← ORIGIN - 9 - iU
            units ← uVal[iSU]
        else if (iU == -27)
            units ← 1 kg/(m^2 s)
        else if (iU == -38)
            units ← 1 debye
    units
# Per iUCodeinfo in docs.
# Adjust special -37 code for heating value
# IF iUcodeis positive,
#
# set base units
# get scaling exponent
#
# for each base unit,
# apply power scale.
#
# Handle special (-) codes
#
# IF -9 through -17
#
# set base units
#
# adjust codes
# set unit
#
# IF -27
#
# set units
#
# IF -38
# set units
# return units
# Test Function:
rp_Uval(1009) = 1 kJ/(kg K)
rp_Uval(9000) = 1 kg/kJ
rp_Uval(-9) = 1 m/s
rp_Uval(-12) = 1 N/m
rp_Uval(-37) = 1 kJ/kg
rp_Uval(-38) = 1 debye
# Consolidate return vector, combining multiple-output values in to sub-vectors
rp_Comp(vOut, Rvals) :=
    ncomp ← rp_REFPROP1("", "NCOMP", 0, 0)
    O ← ORIGIN
    j ← O
    for i ∈ O .. last(vOut)
        if rp_IsMulti(vOut[i])
            Rc[i] ← submatrix(Rvals, j, j + ncomp - 1, O, O)
            j ← j + ncomp
        else
            Rc[i] ← Rvals[j]
            j ← j + 1
    Rc
REFPROP(hFld, hIn, hOut, a, b) :=
    if rp_getRPnum(0) ≥ 10
        hFld ← if(hFld == " ", "", hFld)
        vOut ← StrSplit(hOut)
        nOut ← MultiOut(vOut)
        "//*****Call the correct REFPROP function*****//"
        if (rp_IsChar(hOut) == 1)
            if nOut == 1
                try
                    Ret ← rp_REFPROPc(hFld, hIn, hOut, a, b)
                on error
                    error(rp_ERRMSG(0))
                return Ret
            else
                error("Only one string result can be retrieved at a time.")
        else
            inputs ← iCount(hIn)
            if inputs > 0
                a ← rp_scale(substr(hIn, ORIGINc, 1), a)
                if inputs > 1
                    b ← rp_scale(substr(hIn, ORIGINc + 1, 1), b)
            if (nOut == 1) and (hFld == "")
                try
                    Ret ← rp_REFPROP1(hIn, hOut, a, b)
                on error
                    error(rp_ERRMSG(0))
            else
                try
                    Ret ← rp_REFPROP(hFld, hIn, hOut, a, b)
                on error
                    error(rp_ERRMSG(0))
            "//**Add Units to return values and compress**//"
            iUlist ← rp_UNITS(hOut)
            Ret ← vectorize(Ret*rp_Uval(iUlist))
            Ret ← rp_Comp(vOut, Ret)
        "//************Return the result(s)*************//"
        if IsArray(Ret) and (length(Ret) == 1)
            return Ret[ORIGIN]
        else
            return Ret
    else
        error("ERROR: Function requires REFPROP 10 or later.")
# Only process if REFPROP v10 or greater.
# If fluid string is a space, set to empty string
# Split the output string into multiple string array
# Get the number of multi-valued output strings
# IF requesting characters:
# IF only requesting one single output string
#
# Call REPFROPdll to return a character string.
#
# Throw error if call fails
#
# Otherwise, throw error for requesting multiple string values.
#
# ELSE requesting values (scalar or multiple values)
#
# Count number of inputs provided
# IF more than one input parameter (a or b)
# Strip units form first parameter
#
# Strip units from second parameter (if necessary)
#
# IF only requesting one output and fluid not specified,
#
# Call REFPROP1dll directly
#
# Throw REFPROP error if call fails.
#
# OTHERWISE - multiple outputs and/or fluid string specified
#
# Call REPFROPdll directly with all parameters
#
# Apply Units to each of the output array values.
#
# IF array returned and length is only 1
# THEN just return first element as a scalar value
#
# ELSE
# Return the entire array
# IF not REFPROP v10 or greater, throw error.
